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/BATCH
/COM,ANSYS RELEASE 2019 R2           BUILD 19.4      UP20190416       00:21:24
/input,menust,tmp,''
/GST,ON
/PLO,INFO,3
/GRO,CURL,ON
/CPLANE,1
WPSTYLE,,,,,,,,0
!画面設定ファイル;b,ml,vel.graphicsettingsファイルが必要
!1.0初期設定パラメータファイル;ReadMatParameters,ReadExpParameters,ReadAnalysisParameters.mac
!1.1 コメントアウトを一部変更,ReadMatParametersを整列
!191115:9.1の位置変更。
!191116:parametersファイルを作成。中に材料データ全部ぶち込んだ。
!191118:微修正
!191118-2:画像保存先を"images"に設定
!191118-3:Images関連をいったん削除
!191118-4:エリア作成法をKP作成-Area作成に変更,KP,Area番号振り直し
!191121:材料特性データを全部外部化:Flyer,Parent材料変更への柔軟化
!無限要素はまとめてメッシュするとバグる
!ループ処理のネスト化
FINISH
/clear,all
/COM,ANSYS RELEASE 2019 R2           BUILD 19.4      UP20190416       00:55:53
/title, DE:5kJ G:1.6mm T:0.4mm OL:3mm F:Cu P:Ni
/nerr,0,99999999,-1,,-1
/inquire,home_dir,directory !ホームディレクトリを"home_dir"に記録
!
!    1.1.実験パラメータ:ReadExpParametersから読み込み
!
/cwd,parameters     !ディレクトリを移動
*use,ReadExpParameters.mac
/cwd,home_dir(1,1)     !ホームディレクトリへ戻る
!
!    1.2.解析パラメータ
!
*SET,msc,0.5E-3    !コイルのメッシュサイズ
*SET,msf,0.1E-3    !flyerのメッシュサイズ
*SET,msa,0.1E-3    !parentのメッシュサイズ
*SET,mss,2E-3    !空間のメッシュサイズ
*SET,cg,0.01E-3    !衝突面のオフセット量
*SET,time,0     !初期時間
*SET,ftime,29E-6    !終了時刻
*SET,tinc,0.5E-6    !時間間隔
*SET,tfmag,19E-6    !電磁場を計算する時間(この時間以降は電磁場を計算しない)
*SET,cycle,ftime/tinc   !繰り返し回数
*SET,cn,429     !メッシュを変更するたびに変更が必要。コイルの節点を選択
*SET,nmax,12892    !ldreadのコマンドに必要、メッシュ変更時にチェック(flyer)
*SET,nmin,3084    !ldreadのコマンドに必要、メッシュ変更時にチェック(flyer)
*SET,fdnmax,5633    !flyerの拘束条件に必要、メッシュ変更時にチェック
*SET,fdnmin,4494    !flyerの拘束条件に必要、メッシュ変更時にチェック
*SET,adnmax,15230    !anvilの拘束条件に必要、メッシュ変更時にチェック
*SET,adnmin,15155    !anvilの拘33束条件に必要、メッシュ変更時にチェック
*SET,ppbotmin,12893    !parent plateのtarge適用範囲
*SET,ppbotmax,13193    !parent plateのtarge適用範囲
*SET,pptopmin,13202    !parent plateのconta適用範囲
*SET,pptopmax,13501    !parent plateのconta適用範囲
*SET,anbotmin,15002    !anvilのtarge適用範囲
*SET,anbotmax,15078    !anvilのtarge適用範囲
!
!    1.3.材料データ定義
!    *use,材料,MatNo,'MatType'
!    Cu,2,Coil
!    Cu,3,Flyer
!    SKD11,4,Anvil
!    Ni,5,Parent
!
/PREP7
mptemp,1,0    !ヤング率とポアソン比を定義するため
/cwd,parameters
*use,Air.mac,1,'Air'
*use,Cu.mac,2,'Coil'
*use,Cu.mac,3,'Flyer'
*use,SKD11.mac,4,'Anvil'
*use,Ni.mac,5,'Parent'
/cwd,home_dir(1,1)
!
!Powerlaw Plasticity Example: Aluminum 1100
!MP,ex,4,69e9 ! Pa
!MP,nuxy,4,.33 ! No units
!MP,dens,4,2710 ! kg/m3
!TB,PLAW,4,,,2
!TBDATA,1,0.598 ! k
!TBDATA,2,0.216 ! n
!TBDATA,3,6500.0 ! C (s-1)
!TBDATA,4,4.0 ! P
!
parsev,scalar,p0   !初期パラメータを保存
!
!    1.4.要素タイプ定義
!
/PREP7
et,1,plane13       !1:空間(連成場要素,レガシー要素であり推奨はPLANE223)
et,2,plane53,4     !2:コイル(2D金属塊コンダクタ)
et,3,plane53       !3:板材，金型
!画面設定ファイル;b,ml,vel.graphicsettingsファイルが必要
!1.0初期設定パラメータファイル;ReadMatParameters,ReadExpParameters,ReadAnalysisParameters.mac
!1.1 コメントアウトを一部変更,ReadMatParametersを整列
!191115:9.1の位置変更。
!191116:parametersファイルを作成。中に材料データ全部ぶち込んだ。
!191118:微修正
!191118-2:画像保存先を"images"に設定
!191118-3:Images関連をいったん削除
!191118-4:エリア作成法をKP作成-Area作成に変更,KP,Area番号振り直し
!191121:材料特性データを全部外部化:Flyer,Parent材料変更への柔軟化
!無限要素はまとめてメッシュするとバグる
!ループ処理のネスト化
FINISH
/clear,all
/COM,ANSYS RELEASE 2019 R2           BUILD 19.4      UP20190416       01:14:54
/title, DE:5kJ G:1.6mm T:0.4mm OL:3mm F:Cu P:Ni
/nerr,0,99999999,-1,,-1
/inquire,home_dir,directory !ホームディレクトリを"home_dir"に記録
!
!    1.1.実験パラメータ:ReadExpParametersから読み込み
!
/cwd,parameters     !ディレクトリを移動
*use,ReadExpParameters.mac
/cwd,home_dir(1,1)     !ホームディレクトリへ戻る
!
!    1.2.解析パラメータ
!
*SET,msc,0.5E-3    !コイルのメッシュサイズ
*SET,msf,0.1E-3    !flyerのメッシュサイズ
*SET,msa,0.1E-3    !parentのメッシュサイズ
*SET,mss,2E-3    !空間のメッシュサイズ
*SET,cg,0.01E-3    !衝突面のオフセット量
*SET,time,0     !初期時間
*SET,ftime,29E-6    !終了時刻
*SET,tinc,0.5E-6    !時間間隔
*SET,tfmag,19E-6    !電磁場を計算する時間(この時間以降は電磁場を計算しない)
*SET,cycle,ftime/tinc   !繰り返し回数
*SET,cn,429     !メッシュを変更するたびに変更が必要。コイルの節点を選択
*SET,nmax,12892    !ldreadのコマンドに必要、メッシュ変更時にチェック(flyer)
*SET,nmin,3084    !ldreadのコマンドに必要、メッシュ変更時にチェック(flyer)
*SET,fdnmax,5633    !flyerの拘束条件に必要、メッシュ変更時にチェック
*SET,fdnmin,4494    !flyerの拘束条件に必要、メッシュ変更時にチェック
*SET,adnmax,15230    !anvilの拘束条件に必要、メッシュ変更時にチェック
*SET,adnmin,15155    !anvilの拘33束条件に必要、メッシュ変更時にチェック
*SET,ppbotmin,12893    !parent plateのtarge適用範囲
*SET,ppbotmax,13193    !parent plateのtarge適用範囲
*SET,pptopmin,13202    !parent plateのconta適用範囲
*SET,pptopmax,13501    !parent plateのconta適用範囲
*SET,anbotmin,15002    !anvilのtarge適用範囲
*SET,anbotmax,15078    !anvilのtarge適用範囲
!
!    1.3.材料データ定義
!    *use,材料,MatNo,'MatType'
!    Cu,2,Coil
!    Cu,3,Flyer
!    SKD11,4,Anvil
!    Ni,5,Parent
!
/PREP7
mptemp,1,0    !ヤング率とポアソン比を定義するため
/cwd,parameters
*use,Air.mac,1,'Air'
*use,Cu.mac,2,'Coil'
*use,Cu.mac,3,'Flyer'
*use,SKD11.mac,4,'Anvil'
*use,Ni.mac,5,'Parent'
/cwd,home_dir(1,1)
!
!Powerlaw Plasticity Example: Aluminum 1100
!MP,ex,4,69e9 ! Pa
!MP,nuxy,4,.33 ! No units
!MP,dens,4,2710 ! kg/m3
!TB,PLAW,4,,,2
!TBDATA,1,0.598 ! k
!TBDATA,2,0.216 ! n
!TBDATA,3,6500.0 ! C (s-1)
!TBDATA,4,4.0 ! P
!
parsev,scalar,p0   !初期パラメータを保存
!
!    1.4.要素タイプ定義
!
/PREP7
et,1,plane13       !1:空間(連成場要素,レガシー要素であり推奨はPLANE223)
et,2,plane53,4     !2:コイル(2D金属塊コンダクタ)
et,3,plane53       !3:板材，金型(2-D 8-Node Magnetic Solid)
et,4,infin110      !4;無限境界
et,5,circu124,2    !5:キャパシタ
et,6,circu124,0    !6:抵抗
et,7,circu124,6    !7:2D塊型導体電圧源
et,8,circu124,1    !8:インダクタ
et,9,conta172      !9:Flyerの衝突面
keyopt,9,12,3      !Conta172のキーオプション, 0:標準　1:滑りなし　2:分離なし(滑りは可)
!3:固着　4:分離なし(常時)　5:固着(常時)　6:固着(初期接触)
et,10,targe169     !10:Parentの衝突面
!
!    1.5.材料特性代入
!
emunit,mks    !単位系定義(メートル、キログラム、秒)
!    空気:1
mp,murx,1,rpAir,   !空気の比透磁率
!    Coil:2(Cu)
mp,murx,2,rpCoil,    !比透磁率
mp,rsvx,2,erCoil,    !電気抵抗率
mp,dens,2,dCoil    !密度
!    Flyer:3(Cu)
mp,murx,3,rpFlyer,    !比透磁率
mp,rsvx,3,erFlyer,    !電気抵抗率
mp,dens,3,dFlyer    !密度
!    Anvil:4(SKD11)
mp,murx,4,rpAnvil,    !比透磁率
mp,rsvx,4,erAnvil,    !電気抵抗率
mp,dens,4,dAnvil    !密度
!    Parent:5(Ni)
mp,murx,5,rpParent,    !比透磁率
mp,rsvx,5,erParent,    !電気抵抗率
mp,dens,5,dParent    !密度
!
!    1.6.リアルコンスタント定義
!
r,1,40e-6,cv    !キャパシタンス(F),初期電圧(V)
r,2,rmpw    !回路解析→装置の抵抗値
r,3,1,0    !ファクター
r,4,acoil,,cl,+1   !断面積,,奥行き方向の長さ、電流方向　→コイル
r,5,aplate,,pl,+1   !断面積,,奥行き方向の長さ、電流方向　→板
r,6,idmpw,    !インダクタンス
r,7,aanvil,,pl,+1   !断面積,,奥行き方向の長さ、電流方向　→parent
r,8     !接触ペア、FlyerとParentで共通のリアルコンスタントを使う
rmore,,,,cg    !衝突面のオフセット
r,9,1    !無限要素のリアルコンスタント
r,10,1
!
!    2.回路作成用のノード定義
!
n,1,-0.1,-0.025
n,2,-0.1,0.025
n,3,-0.125,-0.025
n,4,-0.125,0.025
!
!     3.モデル作成
!
!     3.1.KP定義
!     コイルのKP定義(1-6)
k,,-30E-3,-10E-3      !キーポイント1
k,,-20E-3,-10E-3      !キーポイント2
k,,-20E-3,-8E-3       !キーポイント3
k,,-23.5E-3,5E-3      !キーポイント4
k,,-26.5E-3,5E-3      !キーポイント5
k,,-30E-3,-8E-3       !キーポイント6
!     FlyerのKP定義(7-10)
k,,-23.5E-3-ol,5E-3+fcgap
k,,+46.5E-3-ol,5E-3+fcgap
k,,+46.5E-3-ol,5E-3+fcgap+tnf
k,,-23.5E-3-ol,5E-3+fcgap+tnf
!     ParentのKP定義(11-14)
k,,-32E-3,5E-3+fcgap+tnf+gap
k,,-17E-3,5E-3+fcgap+tnf+gap
k,,-17E-3,5E-3+fcgap+tnf+gap+tna
k,,-32E-3,5E-3+fcgap+tnf+gap+tna
!     AnvilのKP定義(15-18)
k,,-32E-3,5E-3+fcgap+tnf+gap+tna+0.1E-3
k,,-17E-3,5E-3+fcgap+tnf+gap+tna+0.1E-3
k,,-17E-3,5E-3+fcgap+tnf+gap+tna+15E-3
k,,-32E-3,5E-3+fcgap+tnf+gap+tna+15E-3
!     空間四隅のKP定義(19-22)
k,,-50E-3,-20E-3     !左下(19)
k,,45E-3,-20E-3     !右下(20)
k,,45E-3,30E-3     !右上(21)
k,,-50E-3,30E-3     !左上(22)
!
!     3.2.エリア生成
!
a,1,2,3,4,5,6     !コイル
a,7,8,9,10     !Flyer
a,11,12,13,14     !Parent
a,15,16,17,18     !Anvil
a,19,20,21,22     !空間
aovlap,all     !空間のオーバーラップ
numcmp,area     !エリア番号振り直し
!     無限要素四隅のKP定義(23-26)
k,,-60E-3,-30E-3      !無限要素　キーポイント23
k,,55E-3,-30E-3       !無限要素　キーポイント24
k,,55E-3,40E-3        !無限要素　キーポイント25
k,,-60E-3,40E-3       !無限要素　キーポイント26
a,23,19,22,26       !無限要素(左)
a,23,24,20,19       !無限要素(下)
a,20,24,25,21       !無限要素(右)
a,22,21,25,26       !無限要素(上)
!
!    3.3.エリアへの材料No,リアルコンスタント,要素タイプ定義
!
!AATT,材料番号, リアルコンスタント, 要素タイプ
aplot
asel,s,,,1    !コイル
aatt,2,4,2
asel,s,,,2    !flyer
aatt,3,5,3
asel,s,,,3    !parent
aatt,5,7,3
asel,s,,,4    !anvil
aatt,4,7,3
asel,s,,,5    !空気
aatt,1,,1
asel,s,,,6    !無限境界左
aatt,1,9,4
asel,s,,,7    !無限境界右
aatt,1,9,4
asel,s,,,8    !無限境界下
aatt,1,9,4
asel,s,,,9    !無限境界左
aatt,1,9,4
!
!    4.メッシング
!
!以下MappedMesh用
!MSHAPE,0,2D
!MSHKEY,1
!
!     コイル
!
esize,msc
asel,s,,,1
amesh,all
lrefine,4,,,3,,,on     !上辺のメッシュ微細化
!
!     Flyer
!
allsel
esize,msf
asel,s,,,2
amesh,all
!     接触要素定義(F-P)
type,9     !Conta172
real,8     !接触ペアのため、Parentと同じリアルコンスタントを用いる
asel,s,,,2    !Flyerのエリア選択
nsla,s,1    !選択エリア内の節点選択
esurf     !表面に要素作成
NLIST,ALL, , , ,NODE,NODE,NODE
allsel
esize,msa    !parentのメッシュサイズ
asel,s,,,3
amesh,all    !parentのメッシング
!     接触要素定義(F-P)
type,10     !Targe169
real,8     !接触ペアのため、Flyerと同じリアルコンスタントを用いる
rmore,,,,cg    !衝突面のオフセット※これがないと接触時にモーフィングできなくなる
nsel,,,,ppbotmin,ppbotmax,1
esurf     !表面に要素作成
!     接触要素定義(P-A)
type,9                            !Conta172
real,10                             !接触ペアのため、anvilと同じリアルコンスタントを用いる
nsel,,,,pptopmin,pptopmax,1
esurf                            !表面に要素作成
NPLOT
EPLOT
GPLOT
/NUMBER,0
/PSF,DEFA, ,1,0,1
/PBF,DEFA, ,1
/PSYMB,CS,0
/PSYMB,NDIR,0
/PSYMB,ESYS,1
/PSYMB,LDIV,0
/PSYMB,LDIR,0
/PSYMB,ADIR,0
/PSYMB,ECON,0
/PSYMB,XNODE,0
/PSYMB,DOT,1
/PSYMB,PCONV,
/PSYMB,LAYR,0
/PSYMB,FBCS,0
/PBC,ALL, ,1
ALLSEL,ALL
GPLOT
/PSF,DEFA, ,1,0,1
/PBF,DEFA, ,1
/PSYMB,CS,0
/PSYMB,NDIR,0
/PSYMB,ESYS,1
/PSYMB,LDIV,0
/PSYMB,LDIR,0
/PSYMB,ADIR,0
/PSYMB,ECON,0
/PSYMB,XNODE,0
/PSYMB,DOT,1
/PSYMB,PCONV,
/PSYMB,LAYR,0
/PSYMB,FBCS,0
/PBC,ALL, ,1
APLOT
GPLOT
/PSF,DEFA, ,1,0,1
/PBF,DEFA, ,1
/PSYMB,CS,0
/PSYMB,NDIR,0
/PSYMB,ESYS,1
/PSYMB,LDIV,0
/PSYMB,LDIR,0
/PSYMB,ADIR,0
/PSYMB,ECON,0
/PSYMB,XNODE,0
/PSYMB,DOT,1
/PSYMB,PCONV,
/PSYMB,LAYR,0
/PSYMB,FBCS,0
/PBC,ALL, ,1
/NUMBER,0
/NUMBER,0
/PSF,DEFA, ,1,0,1
/PBF,DEFA, ,1
/PSYMB,CS,0
/PSYMB,NDIR,0
/PSYMB,ESYS,1
/PSYMB,LDIV,0
/PSYMB,LDIR,0
/PSYMB,ADIR,0
/PSYMB,ECON,0
/PSYMB,XNODE,0
/PSYMB,DOT,1
/PSYMB,PCONV,
/PSYMB,LAYR,0
/PSYMB,FBCS,0
/PBC,ALL, ,1
APLOT
/PSF,DEFA, ,1,0,1
/PBF,DEFA, ,1
/PSYMB,CS,0
/PSYMB,NDIR,0
/PSYMB,ESYS,1
/PSYMB,LDIV,0
/PSYMB,LDIR,0
/PSYMB,ADIR,0
/PSYMB,ECON,0
/PSYMB,XNODE,0
/PSYMB,DOT,1
/PSYMB,PCONV,
/PSYMB,LAYR,0
/PSYMB,FBCS,0
/PBC,ALL, ,1
/PSF,DEFA, ,1,0,1
/PBF,DEFA, ,1
/PSYMB,CS,0
/PSYMB,NDIR,0
/PSYMB,ESYS,1
/PSYMB,LDIV,0
/PSYMB,LDIR,0
/PSYMB,ADIR,0
/PSYMB,ECON,0
/PSYMB,XNODE,0
/PSYMB,DOT,1
/PSYMB,PCONV,
/PSYMB,LAYR,0
/PSYMB,FBCS,0
/PBC,ALL, ,1
NPLOT
vlist, all
/PSF,DEFA, ,1,0,1
/PBF,DEFA, ,1
/PSYMB,CS,0
/PSYMB,NDIR,0
/PSYMB,ESYS,1
/PSYMB,LDIV,0
/PSYMB,LDIR,0
/PSYMB,ADIR,0
/PSYMB,ECON,0
/PSYMB,XNODE,0
/PSYMB,DOT,1
/PSYMB,PCONV,
/PSYMB,LAYR,0
/PSYMB,FBCS,0
/PBC,ALL, ,1
ALLSEL,ALL
/PSF,DEFA, ,1,0,1
/PBF,DEFA, ,1
/PSYMB,CS,0
/PSYMB,NDIR,0
/PSYMB,ESYS,1
/PSYMB,LDIV,0
/PSYMB,LDIR,0
/PSYMB,ADIR,0
/PSYMB,ECON,0
/PSYMB,XNODE,0
/PSYMB,DOT,1
/PSYMB,PCONV,
/PSYMB,LAYR,0
/PSYMB,FBCS,0
/PBC,ALL, ,1
VPLOT
APLOT
APLOT
EPLOT
/NUMBER,0
!画面設定ファイル;b,ml,vel.graphicsettingsファイルが必要
!1.0初期設定パラメータファイル;ReadMatParameters,ReadExpParameters,ReadAnalysisParameters.mac
!1.1 コメントアウトを一部変更,ReadMatParametersを整列
!191115:9.1の位置変更。
!191116:parametersファイルを作成。中に材料データ全部ぶち込んだ。
!191118:微修正
!191118-2:画像保存先を"images"に設定
!191118-3:Images関連をいったん削除
!191118-4:エリア作成法をKP作成-Area作成に変更,KP,Area番号振り直し
!191121:材料特性データを全部外部化:Flyer,Parent材料変更への柔軟化
!無限要素はまとめてメッシュするとバグる
!ループ処理のネスト化
FINISH
/clear,all
/COM,ANSYS RELEASE 2019 R2           BUILD 19.4      UP20190416       01:27:50
/title, DE:5kJ G:1.6mm T:0.4mm OL:3mm F:Cu P:Ni
/nerr,0,99999999,-1,,-1
/inquire,home_dir,directory !ホームディレクトリを"home_dir"に記録
!
!    1.1.実験パラメータ:ReadExpParametersから読み込み
!
/cwd,parameters     !ディレクトリを移動
*use,ReadExpParameters.mac
/cwd,home_dir(1,1)     !ホームディレクトリへ戻る
!
!    1.2.解析パラメータ
!
*SET,msc,0.5E-3    !コイルのメッシュサイズ
*SET,msf,0.1E-3    !flyerのメッシュサイズ
*SET,msa,0.1E-3    !parentのメッシュサイズ
*SET,mss,2E-3    !空間のメッシュサイズ
*SET,cg,0.01E-3    !衝突面のオフセット量
*SET,time,0     !初期時間
*SET,ftime,29E-6    !終了時刻
*SET,tinc,0.5E-6    !時間間隔
*SET,tfmag,19E-6    !電磁場を計算する時間(この時間以降は電磁場を計算しない)
*SET,cycle,ftime/tinc   !繰り返し回数
*SET,cn,429     !メッシュを変更するたびに変更が必要。コイルの節点を選択
*SET,nmax,12892    !ldreadのコマンドに必要、メッシュ変更時にチェック(flyer)
*SET,nmin,3084    !ldreadのコマンドに必要、メッシュ変更時にチェック(flyer)
*SET,fdnmax,5633    !flyerの拘束条件に必要、メッシュ変更時にチェック
*SET,fdnmin,4494    !flyerの拘束条件に必要、メッシュ変更時にチェック
*SET,adnmax,15230    !anvilの拘束条件に必要、メッシュ変更時にチェック
*SET,adnmin,15155    !anvilの拘33束条件に必要、メッシュ変更時にチェック
*SET,ppbotmin,12893    !parent plateのtarge適用範囲
*SET,ppbotmax,13193    !parent plateのtarge適用範囲
*SET,pptopmin,13202    !parent plateのconta適用範囲
*SET,pptopmax,13501    !parent plateのconta適用範囲
*SET,anbotmin,15002    !anvilのtarge適用範囲
*SET,anbotmax,15078    !anvilのtarge適用範囲
!
!    1.3.材料データ定義
!    *use,材料,MatNo,'MatType'
!    Cu,2,Coil
!    Cu,3,Flyer
!    SKD11,4,Anvil
!    Ni,5,Parent
!
/PREP7
mptemp,1,0    !ヤング率とポアソン比を定義するため
/cwd,parameters
*use,Air.mac,1,'Air'
*use,Cu.mac,2,'Coil'
*use,Cu.mac,3,'Flyer'
*use,SKD11.mac,4,'Anvil'
*use,Ni.mac,5,'Parent'
/cwd,home_dir(1,1)
!
!Powerlaw Plasticity Example: Aluminum 1100
!MP,ex,4,69e9 ! Pa
!MP,nuxy,4,.33 ! No units
!MP,dens,4,2710 ! kg/m3
!TB,PLAW,4,,,2
!TBDATA,1,0.598 ! k
!TBDATA,2,0.216 ! n
!TBDATA,3,6500.0 ! C (s-1)
!TBDATA,4,4.0 ! P
!
parsev,scalar,p0   !初期パラメータを保存
!
!    1.4.要素タイプ定義
!
/PREP7
et,1,plane13       !1:空間(連成場要素,レガシー要素であり推奨はPLANE223)
et,2,plane53,4     !2:コイル(2D金属塊コンダクタ)
et,3,plane53       !3:板材，金型(2-D 8-Node Magnetic Solid)
et,4,infin110      !4;無限境界
et,5,circu124,2    !5:キャパシタ
et,6,circu124,0    !6:抵抗
et,7,circu124,6    !7:2D塊型導体電圧源
et,8,circu124,1    !8:インダクタ
et,9,conta172      !9:Flyerの衝突面
keyopt,9,12,3      !Conta172のキーオプション, 0:標準　1:滑りなし　2:分離なし(滑りは可)
!3:固着　4:分離なし(常時)　5:固着(常時)　6:固着(初期接触)
et,10,targe169     !10:Parentの衝突面
!
!    1.5.材料特性代入
!
emunit,mks    !単位系定義(メートル、キログラム、秒)
!    空気:1
mp,murx,1,rpAir,   !空気の比透磁率
!    Coil:2(Cu)
mp,murx,2,rpCoil,    !比透磁率
mp,rsvx,2,erCoil,    !電気抵抗率
mp,dens,2,dCoil    !密度
!    Flyer:3(Cu)
mp,murx,3,rpFlyer,    !比透磁率
mp,rsvx,3,erFlyer,    !電気抵抗率
mp,dens,3,dFlyer    !密度
!    Anvil:4(SKD11)
mp,murx,4,rpAnvil,    !比透磁率
mp,rsvx,4,erAnvil,    !電気抵抗率
mp,dens,4,dAnvil    !密度
!    Parent:5(Ni)
mp,murx,5,rpParent,    !比透磁率
mp,rsvx,5,erParent,    !電気抵抗率
mp,dens,5,dParent    !密度
!
!    1.6.リアルコンスタント定義
!
r,1,40e-6,cv    !キャパシタンス(F),初期電圧(V)
r,2,rmpw    !回路解析→装置の抵抗値
r,3,1,0    !ファクター
r,4,acoil,,cl,+1   !断面積,,奥行き方向の長さ、電流方向　→コイル
r,5,aplate,,pl,+1   !断面積,,奥行き方向の長さ、電流方向　→板
r,6,idmpw,    !インダクタンス
r,7,aanvil,,pl,+1   !断面積,,奥行き方向の長さ、電流方向　→parent
r,8     !接触ペア、FlyerとParentで共通のリアルコンスタントを使う
rmore,,,,cg    !衝突面のオフセット
r,9,1    !無限要素のリアルコンスタント
r,10,1
!
!    2.回路作成用のノード定義
!
n,1,-0.1,-0.025
n,2,-0.1,0.025
n,3,-0.125,-0.025
n,4,-0.125,0.025
!
!     3.モデル作成
!
!     3.1.KP定義
!     コイルのKP定義(1-6)
k,,-30E-3,-10E-3      !キーポイント1
k,,-20E-3,-10E-3      !キーポイント2
k,,-20E-3,-8E-3       !キーポイント3
k,,-23.5E-3,5E-3      !キーポイント4
k,,-26.5E-3,5E-3      !キーポイント5
k,,-30E-3,-8E-3       !キーポイント6
!     FlyerのKP定義(7-10)
k,,-23.5E-3-ol,5E-3+fcgap
k,,+46.5E-3-ol,5E-3+fcgap
k,,+46.5E-3-ol,5E-3+fcgap+tnf
k,,-23.5E-3-ol,5E-3+fcgap+tnf
!     ParentのKP定義(11-14)
k,,-32E-3,5E-3+fcgap+tnf+gap
k,,-17E-3,5E-3+fcgap+tnf+gap
k,,-17E-3,5E-3+fcgap+tnf+gap+tna
k,,-32E-3,5E-3+fcgap+tnf+gap+tna
!     AnvilのKP定義(15-18)
k,,-32E-3,5E-3+fcgap+tnf+gap+tna+0.1E-3
k,,-17E-3,5E-3+fcgap+tnf+gap+tna+0.1E-3
k,,-17E-3,5E-3+fcgap+tnf+gap+tna+15E-3
k,,-32E-3,5E-3+fcgap+tnf+gap+tna+15E-3
!     空間四隅のKP定義(19-22)
k,,-50E-3,-20E-3     !左下(19)
k,,45E-3,-20E-3     !右下(20)
k,,45E-3,30E-3     !右上(21)
k,,-50E-3,30E-3     !左上(22)
!
!     3.2.エリア生成
!
a,1,2,3,4,5,6     !コイル
a,7,8,9,10     !Flyer
a,11,12,13,14     !Parent
a,15,16,17,18     !Anvil
a,19,20,21,22     !空間
aovlap,all     !空間のオーバーラップ
numcmp,area     !エリア番号振り直し
!     無限要素四隅のKP定義(23-26)
k,,-60E-3,-30E-3      !無限要素　キーポイント23
k,,55E-3,-30E-3       !無限要素　キーポイント24
k,,55E-3,40E-3        !無限要素　キーポイント25
k,,-60E-3,40E-3       !無限要素　キーポイント26
a,23,19,22,26       !無限要素(左)
a,23,24,20,19       !無限要素(下)
a,20,24,25,21       !無限要素(右)
a,22,21,25,26       !無限要素(上)
!
!    3.3.エリアへの材料No,リアルコンスタント,要素タイプ定義
!
!AATT,材料番号, リアルコンスタント, 要素タイプ
aplot
asel,s,,,1    !コイル
aatt,2,4,2
asel,s,,,2    !flyer
aatt,3,5,3
asel,s,,,3    !parent
aatt,5,7,3
asel,s,,,4    !anvil
aatt,4,7,3
asel,s,,,5    !空気
aatt,1,,1
asel,s,,,6    !無限境界左
aatt,1,9,4
asel,s,,,7    !無限境界右
aatt,1,9,4
asel,s,,,8    !無限境界下
aatt,1,9,4
asel,s,,,9    !無限境界左
aatt,1,9,4
!
!    4.メッシング
!
!以下MappedMesh用
!MSHAPE,0,2D
!MSHKEY,1
!
!     コイル
!
esize,msc
asel,s,,,1
amesh,all
lrefine,4,,,3,,,on     !上辺のメッシュ微細化
/PSF,DEFA, ,1,0,1
/PBF,DEFA, ,1
/PSYMB,CS,0
/PSYMB,NDIR,0
/PSYMB,ESYS,1
/PSYMB,LDIV,0
/PSYMB,LDIR,0
/PSYMB,ADIR,0
/PSYMB,ECON,0
/PSYMB,XNODE,0
/PSYMB,DOT,1
/PSYMB,PCONV,
/PSYMB,LAYR,0
/PSYMB,FBCS,0
/PBC,ALL, ,1
allsel
esize,msf
asel,s,,,2
amesh,all
!     接触要素定義(F-P)
type,9     !Conta172
real,8     !接触ペアのため、Parentと同じリアルコンスタントを用いる
asel,s,,,2    !Flyerのエリア選択
nsla,s,1    !選択エリア内の節点選択
esurf     !表面に要素作成
!
/PSF,DEFA, ,1,0,1
/PBF,DEFA, ,1
/PSYMB,CS,0
/PSYMB,NDIR,0
/PSYMB,ESYS,0
/PSYMB,LDIV,0
/PSYMB,LDIR,0
/PSYMB,ADIR,0
/PSYMB,ECON,0
/PSYMB,XNODE,1
/PSYMB,DOT,1
/PSYMB,PCONV,
/PSYMB,LAYR,0
/PSYMB,FBCS,0
/PBC,ALL, ,1
APLOT
/PSF,DEFA, ,1,0,1
/PBF,DEFA, ,1
/PSYMB,CS,0
/PSYMB,NDIR,0
/PSYMB,ESYS,0
/PSYMB,LDIV,0
/PSYMB,LDIR,0
/PSYMB,ADIR,0
/PSYMB,ECON,0
/PSYMB,XNODE,1
/PSYMB,DOT,1
/PSYMB,PCONV,
/PSYMB,LAYR,0
/PSYMB,FBCS,0
/PBC,ALL, ,1
NPLOT
/PSF,DEFA, ,1,0,1
/PBF,DEFA, ,1
/PSYMB,CS,0
/PSYMB,NDIR,0
/PSYMB,ESYS,0
/PSYMB,LDIV,0
/PSYMB,LDIR,0
/PSYMB,ADIR,0
/PSYMB,ECON,0
/PSYMB,XNODE,1
/PSYMB,DOT,1
/PSYMB,PCONV,
/PSYMB,LAYR,0
/PSYMB,FBCS,0
/PBC,ALL, ,1
/PSF,DEFA, ,1,0,1
/PBF,DEFA, ,1
/PSYMB,CS,0
/PSYMB,NDIR,0
/PSYMB,ESYS,0
/PSYMB,LDIV,0
/PSYMB,LDIR,0
/PSYMB,ADIR,0
/PSYMB,ECON,0
/PSYMB,XNODE,1
/PSYMB,DOT,1
/PSYMB,PCONV,
/PSYMB,LAYR,0
/PSYMB,FBCS,0
/PBC,ALL, ,1
/PSF,DEFA, ,1,0,1
/PBF,DEFA, ,1
/PSYMB,CS,0
/PSYMB,NDIR,0
/PSYMB,ESYS,0
/PSYMB,LDIV,0
/PSYMB,LDIR,0
/PSYMB,ADIR,0
/PSYMB,ECON,0
/PSYMB,XNODE,1
/PSYMB,DOT,1
/PSYMB,PCONV,
/PSYMB,LAYR,0
/PSYMB,FBCS,0
/PBC,ALL,,1
/PBC,NFOR,,0
/PBC,NMOM,,0
/PBC,RFOR,,0
/PBC,RMOM,,0
/PBC,PATH,,0
EPLOT
/PSF,DEFA, ,1,0,1
/PBF,DEFA, ,1
/PSYMB,CS,0
/PSYMB,NDIR,0
/PSYMB,ESYS,1
/PSYMB,LDIV,0
/PSYMB,LDIR,0
/PSYMB,ADIR,0
/PSYMB,ECON,0
/PSYMB,XNODE,0
/PSYMB,DOT,1
/PSYMB,PCONV,
/PSYMB,LAYR,0
/PSYMB,FBCS,0
/PBC,ALL,,1
/PBC,NFOR,,0
/PBC,NMOM,,0
/PBC,RFOR,,0
/PBC,RMOM,,0
/PBC,PATH,,0
allsel
esize,msa    !parentのメッシュサイズ
asel,s,,,3
amesh,all    !parentのメッシング
!     接触要素定義(F-P)
type,10     !Targe169
real,8     !接触ペアのため、Flyerと同じリアルコンスタントを用いる
rmore,,,,cg    !衝突面のオフセット※これがないと接触時にモーフィングできなくなる
nsel,,,,ppbotmin,ppbotmax,1
esurf     !表面に要素作成
EPLOT
EPLOT
NPLOT
ALLSEL,ALL
EPLOT
/PSF,DEFA, ,1,0,1
/PBF,DEFA, ,1
/PSYMB,CS,0
/PSYMB,NDIR,0
/PSYMB,ESYS,1
/PSYMB,LDIV,0
/PSYMB,LDIR,0
/PSYMB,ADIR,0
/PSYMB,ECON,0
/PSYMB,XNODE,0
/PSYMB,DOT,1
/PSYMB,PCONV,
/PSYMB,LAYR,0
/PSYMB,FBCS,0
/PBC,ALL,,1
/PBC,NFOR,,0
/PBC,NMOM,,0
/PBC,RFOR,,0
/PBC,RMOM,,0
/PBC,PATH,,0
/NUMBER,0
LPLOT
/NUMBER,0
lsel,,line,,11 !Flyerの衝突面のラインを選択
NSLL,R,1
NPLOT
lsel,,line,,11 !Flyerの衝突面のラインを選択
ALLSEL,ALL
NPLOT
lsel,,line,,11 !Flyerの衝突面のラインを選択
nsel,,
lsel,,line,,11 !Flyerの衝突面のラインを選択
LPLOT
lsel,,line,,11 !Flyerの衝突面のラインを選択
nsel,r
NPLOT
NPLOT
lsel,,line,,11 !Flyerの衝突面のラインを選択
nsel,r
lsel,,line,,11 !Flyerの衝突面のラインを選択
NSLE,R
APLOT
LPLOT
ALLSEL,ALL
lsel,,line,,11 !Flyerの衝突面のラインを選択
nsel,r,
NPLOT
lsel,,line,,11 !Flyerの衝突面のラインを選択
nsel,r,
lsel,,line,,11 !Flyerの衝突面のラインを選択
nsll
nsel,,,,ppbotmin,ppbotmax,1  !座標を上手く指定して選択できないの?
ALLSEL,ALL
NPLOT
nsel,,,,ppbotmin,ppbotmax,1  !座標を上手く指定して選択できないの?
ALLSEL,ALL
lsel,,line,,11 !Flyerの衝突面のラインを選択
nsel,r,
lsel,,line,,11 !Flyerの衝突面のラインを選択
nsll
FINISH
! /EXIT,NOSAV
